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/BATCH
/COM,ANSYS RELEASE 2025 R2           BUILD 25.2      UP20250519       02:58:17
/input,menust,tmp,''
/COM,ANSYS RELEASE 2025 R2           BUILD 25.2      UP20250519       02:58:17
/GST,ON
/PLO,INFO,3
/GRO,CURL,ON
/CPLANE,1
WPSTYLE,,,,,,,,0
/INPUT,'ansystrusscommands','','C:\Users\cast5412\Downloads\',, 0
FINISH
/SOL
FLST,2,2,1,ORDE,2
FITEM,2,36
FITEM,2,52
/GO
D,P51X,ALL,0, , , , , , , , ,
FLST,2,2,1,ORDE,2
FITEM,2,17
FITEM,2,68
/GO
D,P51X,ALL,0, , , ,VELY, , , , ,
FLST,2,2,1,ORDE,2
FITEM,2,17
FITEM,2,68
/GO
D,P51X,ALL,0, , , ,VELY,VELZ, , , ,
FINISH
/POST1
FINISH
/SOL
F,43,FY,-111.2
F,26,FY,-111.2
SAVE
FINISH
/POST1
FINISH
/SOL
/STATUS,SOLU
SOLVE
FINISH
/PREP7
SECTYPE, 0, LINK, ,
! LINK1
SECTYPE, 0, LINK,
! LINK1
SECTYPE,0,LINK,,LINK1
SECDATA,2.5
FINISH
/POST1
FINISH
/SOL
/STATUS,SOLU
SOLVE
FINISH
/POST1
PRNSOL,U,COMP
PRNSOL,U,COMP
SET,LAST
PLDISP,1
SAVE
FINISH
/SOL
FINISH
/PREP7
FLST,2,1,1,ORDE,1
FITEM,2,1
/GO
D,P51X,ALL,0, , , , , , , , ,
FINISH
/SOL
FINISH
/POST1
FINISH
/SOL
/STATUS,SOLU
SOLVE
FINISH
/POST1
PLDISP,1
PLDISP,1
SAVE
FINISH
! /EXIT,ALL
